VAX := READPRN("C:\Users\Kate\Downloads\mc\circuit7.DNO")
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Id1 := max(VAX[:, 1]) = 4.15642
Ud1 := max(VAX[:, 0]) = 0.343511
Id2 := Id1/2.374 = 1.75081
Ud2 := linterp(VAX[:, 1], VAX[:, 0], Id2) = 0.298508
Id3 := Id2/2 = 0.875404
Ud3 := linterp(VAX[:, 1], VAX[:, 0], Id3) = 0.262862
Id4 := Id3/2 = 0.437702
Ud4 := linterp(VAX[:, 1], VAX[:, 0], Id4) = 0.226935
NfT := 0.02
Iso := 0.0002654
m := 0.3862
Rb := 0.0000002978
Given
Ud1 == Id1*Rb + ln((Iso + Id1)/Iso)*NfT*m
Ud2 == Id2*Rb + ln((Iso + Id2)/Iso)*NfT*m
VAX = [
    0, 0;
    0.0157951, 0.0022017;
    0.0309866, 0.0050072;
    0.0454574, 0.0085335;
    0.0591406, 0.0128475;
    0.0719575, 0.0180281;
    0.0838895, 0.0240937;
    0.0949384, 0.0310426;
    0.105117, 0.0388624;
    0.114491, 0.0474865
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]
Ud3 == Id3*Rb + ln((Iso + Id3)/Iso)*NfT*m
Ud4 == Id4*Rb + ln((Iso + Id4)/Iso)*NfT*m
Diod_P := Minerr(Iso, Rb, NfT, m)
Diod_P = [0.00564377; 2.27851e-6; 0.0520027; 1.00029]
Rb := (Ud3 - 2*Ud2 + Ud1)/Id3 = 0.0106896
NfT := ((3*Ud2 - 2*Ud3) - Ud1)/ln(2) = 0.0379254
Iso := Id3*e^((Ud2 - 2*Ud3)/NfT) = 0.0021892
Udiod(Idiod) := Idiod*Rb + NfT*ln((Iso + Idiod)/Iso)
Idiod := 0, 10^-5 .. 4.156
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