VAR := READPRN("C:\Users\Kate\Downloads\university\circuit1 Peak_X(dB(v(3)),1,1) vs V2.ANO")
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VAR = [
    1, 104100;
    2, 114319;
    3, 121836;
    4, 127916;
    5, 132984;
    6, 137375;
    7, 141260;
    8, 144723;
    9, 147932;
    10, 150803;
    11, 153506;
    12, 156040;
    13, 158404;
    14, 160600;
    15, 162627;
    16, 164654;
    17, 166512;
    18, 168285;
    19, 169974;
    20, 171579;
    21, 173184;
    22, 174704;
    23, 176140;
    24, 177491;
    25, 178842;
    26, 180193;
    27, 181460;
    28, 182643;
    29, 183825;
    30, 185007
]
Lk := 10^-3
Ck := 10^-10
Frez := VAR[:, 1]
Cd := (1/(4*Frez^2*π^2*Lk)) - Ck
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Cd = [2.23741e-9; 1.83821e-9; 1.60644e-9; 1.44806e-9; 1.33233e-9; 1.24222e-9; 1.16941e-9; 1.10939e-9; 1.05749e-9; 1.01383e-9; 9.74954e-10; 9.40329e-10; 9.095e-10; 8.82084e-10; 8.57757e-10; 8.34322e-10; 8.13587e-10; 7.94432e-10; 7.76744e-10; 7.60422e-10; 7.44552e-10; 7.29918e-10; 7.16444e-10; 7.0406e-10; 6.91955e-10; 6.80122e-10; 6.69268e-10; 6.5934e-10; 6.49604e-10; 6.40053e-10]
Cj := 10^-12
Vj := 1
M := 0.41
Given
Cd == Cj*(1 - (-VAR)[:, 0]/Vj)^(-M)
0 < Vj < 0.75
1/3 < M < 1/2
Find(Cj, Vj, M) = [3.24172e-9; 0.75; 0.436754]
