VAX := READPRN("C:\Users\Kate\Downloads\multisim\lab_03.dlm")
VAX[:, 1] := 0.00703 + VAX[:, 1]
VAX := csort(VAX, 1)
VAX[:, 0] := 0.3 + VAX[:, 0]
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m := 0.25
Rb := 0.0000003
NfT := 0.02
Iso := 0.0000001
Id := VAX[:, 1]
Ud := VAX[:, 0]
Given
Ud == Id*Rb + ln((Iso + Id)/Iso)*NfT*m
Diod_P := Minerr(Iso, Rb, NfT, m)
Diod_P = [0.000168287; -3.21521; 0.0833194; 1.04173]
Iso := Diod_P[0, 0]
Rb := Diod_P[1, 0]
Nft := Diod_P[2, 0]
Idiod := VAX[:, 1]
Udiod(Idiod) := Idiod*Rb + Nft*ln((Iso + Idiod)/Iso)
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VAX = [
    0.00953, 2.617e-5;
    0.014552, 3.99e-5;
    0.03325, 0.00010752;
    0.047733, 0.00015208;
    0.082517, 0.00030347;
    0.103577, 0.00040015;
    0.145108, 0.00070875;
    0.16576, 0.00091499;
    0.200571, 0.00148645;
    0.215822, 0.00183592
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]
