VAX := READPRN("C:\Users\Kate\Downloads\multisim\lab_04_5ex_2.dlm")
VAX := csort(VAX, 1)
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m := 1.05
Rb := 0.0000003
NfT := 0.02
Iso := 0.000000001
Id := VAX[:, 1]
Ud := VAX[:, 0]
Given
Ud == Id*Rb + ln((Iso + Id)/Iso)*NfT*m
Diod_P := Minerr(Iso, Rb, NfT, m)
Diod_P = [0.00602502; 0.000159383; 0.0524721; 1.00329]
Iso := Diod_P[0, 0]
Rb := Diod_P[1, 0]
Nft := Diod_P[2, 0]
Idiod := VAX[:, 1]
Udiod(Idiod) := Idiod*Rb + Nft*ln((Iso + Idiod)/Iso)
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VAX = [
    0, 0;
    0.01, 0.00131531;
    0.02, 0.00289615;
    0.03, 0.00479724;
    0.04, 0.00708458;
    0.05, 0.00983777;
    0.06, 0.0131528;
    0.07, 0.0171455;
    0.08, 0.0219554;
    0.09, 0.0277513
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]
