VAR := READPRN("C:\Users\Kate\Downloads\multisim\vfx.dlm")
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VAR = [
    5, 132263;
    6, 136156;
    7, 139750;
    8, 142844;
    9, 145739;
    10, 148434;
    11, 150930;
    12, 153126;
    13, 155222
]
Lk := 10^-3
Ck := 10^-10
Frez := VAR[:, 1]
Cd := (1/(4*Frez^2*π^2*Lk)) - Ck
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Cd = [1.34798e-9; 1.26636e-9; 1.19699e-9; 1.14141e-9; 1.09258e-9; 1.04967e-9; 1.01196e-9; 9.80295e-10; 9.51317e-10]
Cj := 10^-12
Vj := 1
M := 0.41
Given
Cd == Cj*(1 - (-VAR)[:, 0]/Vj)^(-M)
0 < Vj < 0.75
1/3 < M < 1/2
Find(Cj, Vj, M) = [3.05305e-9; 0.75; 0.400895]
